*Heading
 Biegung
** Job name: Biegung Model name: BW_Versuch
** Generated by: Abaqus/CAE 2022
*Preprint, echo=NO, model=NO, history=NO, contact=NO
**
** PARTS
**
*Part, name=Blech
*Node
      1,         -50.,         -0.5
      2,  -49.9000015,         -0.5
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*Element, type=CPS4
   1,    1,    2,  503,  502
   2,    2,    3,  504,  503
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*Nset, nset=Blech, generate
    1,  5511,     1
*Elset, elset=Blech, generate
    1,  5000,     1
*Nset, nset=Symm_X, generate
  501,  5511,   501
*Elset, elset=Symm_X, generate
  500,  5000,   500
*Elset, elset=_Blech_S1, internal, generate
   1,  500,    1
*Elset, elset=_Blech_S2, internal, generate
  500,  5000,   500
*Elset, elset=_Blech_S3, internal, generate
 4501,  5000,     1
*Elset, elset=_Blech_S4, internal, generate
    1,  4501,   500
*Surface, type=ELEMENT, name=Blech
_Blech_S1, S1
_Blech_S2, S2
_Blech_S4, S4
_Blech_S3, S3
** Section: Stahl
*Solid Section, elset=Blech, material=Stahl
,
*End Part
**
*Part, name=Klemme
*Node
      1,           0.,         -0.5
      2,           0.,          0.5
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*Element, type=R2D2
  1,   1,   3
  2,   3,   4
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*Node
   1383,           0.,           0.,           0.
*Nset, nset=Klemme-RefPt_, internal
1383,
*Nset, nset=Klemme, generate
    1,  1382,     1
*Elset, elset=Klemme, generate
    1,  1382,     1
*Nset, nset=RP
 1383,
*Elset, elset=_Surface_Upper_SNEG, internal, generate
  692,  1382,     1
*Surface, type=ELEMENT, name=Surface_Upper
_Surface_Upper_SNEG, SNEG
*Elset, elset=_Surface_Lower_SNEG, internal, generate
   1,  691,    1
*Surface, type=ELEMENT, name=Surface_Lower
_Surface_Lower_SNEG, SNEG
*Elset, elset=Klemme, generate
    1,  1382,     1
*Element, type=MASS, elset=RP_Mass_MASS_
1383, 1383
*Mass, elset=RP_Mass_MASS_
1e-05,
*Element, type=ROTARYI, elset=RP_Mass_ROTI_
1384, 1383
*Rotary Inertia, elset=RP_Mass_ROTI_
1e-05, 1e-05, 1e-05, 0., 0., 0.
*End Part
**
*Part, name=Werkzeug
*End Part
**
**
** ASSEMBLY
**
*Assembly, name=Assembly
**
*Instance, name=Blech_1, part=Blech
*End Instance
**
*Instance, name=Klemme, part=Klemme
        -45.,           0.,           0.
*End Instance
**
*Instance, name=Werkzeug_Oben, part=Werkzeug
          0.,          4.5,           0.
*Node
      1,           0.,           0.,           0.
*Nset, nset=Werkzeug_Oben-RefPt_, internal
1,
*Nset, nset=RP
 1,
*Surface, type=SEGMENTS, name=Surface
START,           4.,           0.
 CIRCL,           0.,          -4.,           0.,           0.
 CIRCL,          -4.,           0.,           0.,           0.
 CIRCL,           0.,           4.,           0.,           0.
 CIRCL,           4.,           0.,           0.,           0.
*Element, type=MASS, elset=RP_Mass_MASS_
1, 1
*Mass, elset=RP_Mass_MASS_
1e-05,
*Element, type=ROTARYI, elset=RP_Mass_ROTI_
2, 1
*Rotary Inertia, elset=RP_Mass_ROTI_
1e-05, 1e-05, 1e-05, 0., 0., 0.
*End Instance
**
*Instance, name=Werkzeug_Unten, part=Werkzeug
          0.,         -4.5,           0.
*Node
      1,           0.,           0.,           0.
*Nset, nset=Werkzeug_Unten-RefPt_, internal
1,
*Nset, nset=RP
 1,
*Surface, type=SEGMENTS, name=Surface
START,           4.,           0.
 CIRCL,           0.,          -4.,           0.,           0.
 CIRCL,          -4.,           0.,           0.,           0.
 CIRCL,           0.,           4.,           0.,           0.
 CIRCL,           4.,           0.,           0.,           0.
*Element, type=MASS, elset=RP_Mass_MASS_
1, 1
*Mass, elset=RP_Mass_MASS_
1e-05,
*Element, type=ROTARYI, elset=RP_Mass_ROTI_
2, 1
*Rotary Inertia, elset=RP_Mass_ROTI_
1e-05, 1e-05, 1e-05, 0., 0., 0.
*End Instance
**
*Surface, type=NODE, name=Werkzeug_Unten_RP_CNS_, internal
Werkzeug_Unten.RP, 1.
*Rigid Body, ref node=Klemme.Klemme-RefPt_, elset=Klemme.Klemme
** Constraint: Werkzeug
*MPC
LINK, Werkzeug_Unten.RP, Werkzeug_Oben.RP
** Constraint: Werkzeug_Oben
*Rigid Body, ref node=Werkzeug_Oben.RP, analytical surface=Werkzeug_Oben.Surface, position=CENTER OF MASS
** Constraint: Werkzeug_Unten
*Rigid Body, ref node=Werkzeug_Unten.RP, analytical surface=Werkzeug_Unten.Surface, position=CENTER OF MASS
*End Assembly
*Amplitude, name=Amplitude, smooth=0.
             0.,              0.,              1.,              1.,              2.,              0.,              3.,             -1.
             4.,              0.,              5.,              1.,              6.,              0.,              7.,             -1.
             8.,              0.,              9.,              1.,             10.,              0.,             11.,             -1.
            12.,              0.,             13.,              1.,             14.,              0.,             15.,             -1.
            16.,              0.,             17.,              1.,             18.,              0.,             19.,             -1.
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            80.,              0.
*Amplitude, name=Amplitude_2, smooth=0.
             0.,              0.,           0.001,              1.
**
** MATERIALS
**
*Material, name=Stahl
*Density
 7.8e-09,
*Elastic
210000., 0.3
*Plastic, hardening=COMBINED, datatype=PARAMETERS, number backstresses=1
1200.,27000.,   20.
*Cyclic Hardening, parameters
1200.,100., 40.
**
** INTERACTION PROPERTIES
**
*Surface Interaction, name=Contact_Friction
1.,
*Friction, slip tolerance=0.005
 0.2,
*Surface Behavior, pressure-overclosure=HARD
*Surface Interaction, name=Contact_NoFriction
1.,
*Friction
0.,
*Surface Behavior, pressure-overclosure=HARD
**
** BOUNDARY CONDITIONS
**
** Name: Klemme Type: Displacement/Rotation
*Boundary
Klemme.RP, 1, 1
Klemme.RP, 2, 2
** Name: Symm_XBC_1 Type: Symmetry/Antisymmetry/Encastre
*Boundary
Blech_1.Symm_X, XSYMM
** Name: Werkzeug_Oben Type: Displacement/Rotation
*Boundary
Werkzeug_Oben.RP, 1, 1
Werkzeug_Oben.RP, 6, 6
** Name: Werkzeug_Unten Type: Displacement/Rotation
*Boundary
Werkzeug_Unten.RP, 1, 1
Werkzeug_Unten.RP, 6, 6
**
** INTERACTIONS
**
** Interaction: Klemme_Oben-Blech
*Contact Pair, interaction=Contact_NoFriction, type=SURFACE TO SURFACE, tracking=STATE
Blech_1.Blech, Klemme.Surface_Upper
** Interaction: Klemme_Unten-Blech
*Contact Pair, interaction=Contact_NoFriction, type=SURFACE TO SURFACE, tracking=STATE
Blech_1.Blech, Klemme.Surface_Lower
** Interaction: Werkzeug_Oben
*Contact Pair, interaction=Contact_NoFriction, type=SURFACE TO SURFACE, tracking=STATE
Blech_1.Blech, Werkzeug_Oben.Surface
** Interaction: Werkzeug_Unten
*Contact Pair, interaction=Contact_NoFriction, type=SURFACE TO SURFACE, tracking=STATE
Blech_1.Blech, Werkzeug_Unten.Surface
** ----------------------------------------------------------------
**
** STEP: Bewegung
**
*Step, name=Bewegung, nlgeom=YES, inc=1000000
*Dynamic
0.02,80.,1e-15,0.5
**
** BOUNDARY CONDITIONS
**
** Name: Werkzeug_Oben Type: Displacement/Rotation
*Boundary, amplitude=Amplitude
Werkzeug_Oben.RP, 1, 1
Werkzeug_Oben.RP, 2, 2, -20.
Werkzeug_Oben.RP, 6, 6
** Name: Werkzeug_Unten Type: Displacement/Rotation
*Boundary, amplitude=Amplitude
Werkzeug_Unten.RP, 1, 1
Werkzeug_Unten.RP, 2, 2, -20.
Werkzeug_Unten.RP, 6, 6
**
** CONTROLS
**
*Controls, reset
*Controls, parameters=time incrementation
, , , , , , , 15, , ,
**
** OUTPUT REQUESTS
**
*Restart, write, frequency=0
**
** FIELD OUTPUT: F-Output-1
**
*Output, field, time interval=0.025
*Node Output
RT, UT
**
** HISTORY OUTPUT: H-Output-1
**
*Output, history, time interval=0.025
*Energy Output
ALLIE, ALLKE, ETOTAL
*End Step
